<Lems xmlns="http://www.neuroml.org/lems/0.7.2" xmlns:xsi="http://www.w3.org/2001/XMLSchema-instance" xsi:schemaLocation="http://www.neuroml.org/lems/0.7.2  https://raw.github.com/LEMS/LEMS/development/Schemas/LEMS/LEMS_v0.7.2.xsd">

    <Target component="sim1" reportFile="/home/padraig/neuroConstruct/osb/cerebellum/cerebellar_granule_cell/GranuleCell/neuroConstruct/simulations/Sim_685/simulator.props" timesFile="/home/padraig/neuroConstruct/osb/cerebellum/cerebellar_granule_cell/GranuleCell/neuroConstruct/simulations/Sim_685/time.dat"/>

        <!--Include standard NeuroML 2 ComponentType definitions-->

    <Include file="Cells.xml"/>
    <Include file="Networks.xml"/>
    <Include file="Simulation.xml"/>

    <Include file="PyNN.xml"/>

        <!--Include the generated NeuroML 2 files-->

        <!--   Channel/synapse files-->
    <Include file="Gran_CaHVA_98.nml"/>
    <Include file="Gran_CaPool_98.nml"/>
    <Include file="Gran_H_98.nml"/>
    <Include file="Gran_KA_98.nml"/>
    <Include file="Gran_KCa_98.nml"/>
    <Include file="Gran_KDr_98.nml"/>
    <Include file="Gran_NaF_98.nml"/>
    <Include file="GranPassiveCond.nml"/>
        <!--   Cell files-->
    <Include file="Granule_98.nml"/>
        <!--   Network file-->
    <Include file="GranuleCell.nml"/>

        <!--Note: this could be: Simulation id="sim1" ... , but Component type="Simulation" ...
        is used to allow validation of this file according to the LEMS schema specified above...-->
    <Component type="Simulation" id="sim1" length="700.0ms" step="0.01ms" target="network_GranuleCell">

        <Display id="GraphWin_0" title="GranuleCell: OnlyVoltage, Gran, VOLTAGE" xmin="-0.07" xmax="0.77000004" ymin="-0.104" ymax="0.064" timeScale="1s">
            <Line id="Gran_v" timeScale="1s" quantity="Gran/0/Granule_98/v" scale="1 V" color="#000000"/>
        </Display>

        <OutputFile id="Gran_v_OF" fileName="/home/padraig/neuroConstruct/osb/cerebellum/cerebellar_granule_cell/GranuleCell/neuroConstruct/simulations/Sim_685/Gran_0.dat">
            <OutputColumn id="v" quantity="Gran/0/Granule_98/v"/>
        </OutputFile>
    </Component>

</Lems>
